Simulations: Version=192
  Memo TitlePage
    ### Base simulation for calculating transport risk across New Zealand

    _Rogerio Cichota, Plant and Food Research, New Zealand_ and _Val Snow, AgResearch, New Zealand_

    _7 April 2025 - updated to r7717, simplified the factor structure and the reporting, and added in reporting of runoff at 30, 60 and 90 days_

    See:
    Snow, V., R. Cichota, L. Lilburne, R. McDowell and S. Vickers (2024). "A method to derive nitrogen transport factors for New Zealand's agricultural lands." MethodsX 13: 102814.

    Initially developed for the Whitiwhiti Ora / Land use opportunities programme, funded by Our Land and Water National Science Challenge, in
    partnership with the Risk Index Tool team from the New Zealand Ministry for the Environment.

    This simulation contain the basic setup for simulating the fate of N from a spike of N applied to a mixed-species pasture sward.
    It is intended to be used as the template for a series of simulation runs on a HPC to obtain N leaching and runoff values that are then post-processed to calculate transport factors.
    For each run on the HPC, the template will be modified by replacing the soil node and the link to the weather data file to cover all farming areas of New Zealand.

    The simulation uses standard APSIM models. In particular, the AGPRyegrass and AGPWhiteClover models are used to simulate a mixed sward with variable clover content.
    The pasture is managed mimicking rotational grazing, with defoliations triggered by rules based on aboveground biomass with some restrictions for the interval between defoliations.
    A simplified approach is used to return dung and for urine depositions.  Based on its digestibility, a certain fraction (around 20%) of the biomass harvested (i.e. of its carbon) is returned to the soil homogeneously as dung; a C:N ratio of 17.5 is used to define the amount of N returned as dung.
    No urine depositions are considered after each grazing to reduce its potential impact on the fate of N leaching.

    The weather data comes from the virtual climate station network (VCSN) of NIWA.
    Soil information is provided by Manaaki Whenua - Landcare based on Smap.
    General rules are also used to control irrigation applications, when this management is enabled.  N fertiliser is not considered.
    A single appication of nitrate-N is set to occur five months after the simulation begins and only outputs after this application date are considered.

    NOTE: Most of the year-month combinations are disabled for speed of running within the test system
  DataStore
  Experiment Exp
    Factors
      Permutation
        Factor Month: Specification=[DateChanger].Script.Month = 1 to 12 step 1
        Factor Year: Specification=[DateChanger].Script.Year = 1973 to 2022 step 1
        Factor State
          CompositeFactor Rainfed: Specifications=[AutomaticIrrigation].Script.AllowIrrigation = No
          CompositeFactor Irr: Specifications=[AutomaticIrrigation].Script.AllowIrrigation = Yes
    Simulation Base
      Manager DateChanger
        Year = 1900
        Month = 1
        Day = 15
```csharp
using System;
using System.Xml.Serialization;
using APSIM.Shared.Utilities;
using Models.Interfaces;
using Models.Core;
using Models.PMF;
using Models.Soils;
using Models.WaterModel;

namespace Models
{
	[Serializable]
	public class DateChangerScript : Model
	{
		//> Links to other Apsim models
		[Link] private Clock clock;
        [Link] private ISummary summary;
	
		[Separator("Change the start and end date from the factor levels")]


		[Description("Year of interest")]
		public int Year {get; set;}

		[Description("Month of interest")]
		public int Month {get; set;}

		[Description("Day of interest")]
		public int Day {get; set;}

		[XmlIgnore] public string DateAsString {get; set;}
		[XmlIgnore] public DateTime ApplicationDate {get; set;}
		[XmlIgnore] public DateTime ApplicationDatePlus30 {get; set;}
		[XmlIgnore] public DateTime ApplicationDatePlus60 {get; set;}
		[XmlIgnore] public DateTime ApplicationDatePlus90 {get; set;}
		
		[EventSubscribe("Commencing")]
		private void OnComencing(object sender, EventArgs e)
		{

            DateAsString = Day + "-" + Month + "-" + Year;
            ApplicationDate = new DateTime(Year, Month, Day);
            
            clock.StartDate = ApplicationDate.AddMonths(-5);
            clock.EndDate = ApplicationDate.AddYears(2).AddDays(-1);
            
            ApplicationDatePlus30 = ApplicationDate.AddDays(30);
            ApplicationDatePlus60 = ApplicationDate.AddDays(60);
            ApplicationDatePlus90 = ApplicationDate.AddDays(90);

            
		}
		
		[EventSubscribe("StartOfSimulation")]
		private void OnStartOfSimulation(object sender, EventArgs e)
		{
            summary.WriteMessage(this, "In DateChanger, the application date will be " + ApplicationDate, MessageType.Information);
            
		}
		
		[EventSubscribe("StartOfDay")]
		private void OnStartOfDay(object sender, EventArgs e)
		{
		}
		
		[EventSubscribe("DoManagement")]
		private void OnDoManagement(object sender, EventArgs e)
		{
		}
		
	}
}
```
      Clock: Start=1980-01-01; End=1982-04-16
      Weather: FileName=19730.met; Latitude=-44.275; Tav=11; Amp=11.4
      MicroClimate: a_interception=0; b_interception=1; c_interception=0; d_interception=0; SoilHeatFluxFraction=0.4; MinimumHeightDiffForNewLayer=0; NightInterceptionFraction=0.5; ReferenceHeight=2
      Forages
        Parameters:
          Name                          LiveDigestibility  DeadDigestibility  LiveFractionConsumable  DeadFractionConsumable  LiveMinimumBiomass  DeadMinimumBiomass
          SurfaceOrganicMatter.Residue  0.7                0.3                0                       0                       100                 0
          AGPRyegrass.Leaf              FromModel          FromModel          1                       1                       10                  0
          AGPRyegrass.Stem              FromModel          FromModel          1                       1                       10                  0
          AGPRyegrass.Stolon            FromModel          FromModel          1                       1                       10                  0
          AGPWhiteClover.Leaf           FromModel          FromModel          1                       1                       10                  0
          AGPWhiteClover.Stem           FromModel          FromModel          1                       1                       10                  0
          AGPWhiteClover.Stolon         FromModel          FromModel          1                       1                       10                  0
      SoilArbitrator
      Summary SummaryFile
      Zone Block: Area=1; Slope=0; AspectAngle=0; Altitude=0
        SimpleGrazing: GrazingRotationType=1; SimpleMinGrazable=0; SimpleGrazingResidual=0; FlexibleGrazePostDM=0; MaximumRotationLengthArray=[60, 60, 60, 60, 60, 60, 60, 60, 60, 60, 60, 60]; MinimumRotationLengthArray=[15, 15, 15, 15, 15, 15, 15, 15, 15, 15, 15, 15]; FractionDefoliatedBiomassToSoil=[0.4]; FractionDefoliatedNToSoil=[0.4]; FractionExcretedNToDung=[1]; CNRatioDung=0; DepthUrineIsAdded=17.5; SendDungElsewhere=0; SendUrineElsewhere=1; UsePatching=false; PseudoPatches=true; ZoneCount=25; UrineReturnPattern=2; PseudoRandomSeed=666; FractionPopulationDecline=0; TramplingOn=false; MaximumPropLitterMovedToSoil=0.1; PastureConsumedAtMaximumRateOfLitterRemoval=1200
          PreGrazeDMArray=[2500, 2500, 2500, 2500, 2500, 2500, 2500, 2500, 2500, 2500, 2500, 2500]
          PostGrazeDMArray=[1250, 1250, 1250, 1250, 1250, 1250, 1250, 1250, 1250, 1250, 1250, 1250]
        Manager AutomaticIrrigation
          AllowIrrigation = Yes
          SeasonStartDate = 1-Sep
          SeasonEndDate = 30-Apr
          IrrigationTriggerType = TriggerBySoilDeficit
          IntervalBetweenIrrigations = 0
          TriggerDeficit = 60
          IrrigationAmountType = BasedOnSoilDeficit
          GivenAmount = 0
          TargetDeficit = 90
          MaximumAmount = 50
          CheckCropActive = Yes
          SkipRainDays = Yes
          ReturnDays = 3
          DepthForPAWC = 500
```csharp
// Determines when and how much irrigation is to be applied based on given instructions and/or soil condition.
// Developed by RCichota, last updated in 10/Dec/2021

using System;
using System.Xml.Serialization;
using APSIM.Shared.Utilities;
using Models.Interfaces;
using Models.Core;
using Models.PMF;
using Models.Soils;

namespace Models
{
    [Serializable]
    [System.Xml.Serialization.XmlInclude(typeof(Model))]
    public class Script : Model
    {
        //> Links to other Apsim models
        [Link] private Clock clock;
        [Link] private IWeather weather;
        [Link] private Irrigation irrigator;
        [Link] private IPhysical soilPhysical;
        [Link] private ISoilWater soilWater;
        [Link(IsOptional = true)] private IPlant existingCrop;
        [Link] private ISummary summary;

        //> User inputs from properties tab
        [Separator("Generic irrigation management")]
        [Description(" Turn automatic irrigation on?")]
        public yesNoAnswer AllowIrrigation { get; set; }
        [Description(" Start of irrigation season (dd-MMM)")]
        public string SeasonStartDate { get; set; }
        [Description(" End of irrigation season (dd-MMM)")]
        public string SeasonEndDate { get; set; }

        [Separator("Parameters defining how the irrigation is triggered")]
        [Description(" How irrigation should be triggered? ")]
        public IrrigationTriggerTypes IrrigationTriggerType { get; set; }
        [Description("  Number of days between irrigations, if using fixed interval")]
        public int IntervalBetweenIrrigations { get; set; }
        [Description("  Deficit to trigger irrigation, if using soil deficit (% PAWC)")]
        public double TriggerDeficit { get; set; }

        [Separator("Parameters defining how much irrigation is applied")]
        [Description(" How irrigation amount is determined? ")]
        public IrrigationAmountTypes IrrigationAmountType { get; set; }
        [Description("  Amount of irrigation to apply, if setting amount (mm)")]
        public double GivenAmount { get; set; }
        [Description("  Deficit to stop irrigation, if based on soil deficit (% PAWC)")]
        public double TargetDeficit { get; set; }
        [Description("  Maximum irrigation application (mm/day)")]
        public double MaximumAmount { get; set; }

        [Separator("Parameters defining extra constraint to irrigation")]
        [Description(" Only apply irrigation if there's a crop?")]
        public yesNoAnswer CheckCropActive { get; set; }
        [Description(" Skip rainy days (rain > 5mm)?")]
        public yesNoAnswer SkipRainDays { get; set; }
        [Description(" Minimum number of days between irrigations (ignored if irrigating using fixed interval")]
        public double ReturnDays { get; set; }

        [Separator("Parameters for computing soil water deficit")]
        [Description("Depth to calculate PAWC (mm)")]
        public double DepthForPAWC { get; set; }

        //> Outputs from this manager
        [XmlIgnore] public double IrrigLayerSWDeficit { get; set; }
        [XmlIgnore] public double TopSWC { get; set; }
        [XmlIgnore] public double TopDUL { get; set; }
        [XmlIgnore] public double TopLL { get; set; }
        [XmlIgnore] public double DaysSinceIrrigation { get; set; }
        [XmlIgnore] public double AmountToApply { get; set; }
        [XmlIgnore] public double SeasonAppliedAmount { get; set; }

        //> Internal variables
        private int bottomLayer;
        private double fracBottomLayer;
        private bool irrigationIsAllowed;
        private bool checkingCropActive;
        private bool skippingRainDays;
        private bool seasonIsOpen;
        private bool cropIsActive;
        private bool rainIsNotSignificant;
        private bool irrigatorIsAvailable;
        private bool soilMoistureIsLow;


        [EventSubscribe("StartOfSimulation")]
        private void OnStartOfSimulation(object sender, EventArgs e)
        {
            //Can we irrigate at all?
            irrigationIsAllowed = false;
            if (AllowIrrigation == yesNoAnswer.Yes)
            {
                irrigationIsAllowed = true;

                //Do we need to check crop?
                checkingCropActive = false;
                if (CheckCropActive == yesNoAnswer.Yes)
                {
                    checkingCropActive = true;
                    if(existingCrop == null)
                    {
                        throw new Exception(" Manager requires checking active crop, but no crop is present");
                    }
                }

                //Do we need to check rainfall?
                skippingRainDays = false;
                if (SkipRainDays == yesNoAnswer.Yes)
                {
                    skippingRainDays = true;
                }
            }

            //Calculate soil water variables
            double depthFromSurface = 0.0;
            for (int layer = 0; layer < soilPhysical.Thickness.Length; layer++)
            {
                fracBottomLayer = Math.Min(1.0, (DepthForPAWC - depthFromSurface) / soilPhysical.Thickness[layer]);
                TopLL += soilPhysical.LL15mm[layer] * fracBottomLayer;
                TopDUL += soilPhysical.DULmm[layer] * fracBottomLayer;
                depthFromSurface += soilPhysical.Thickness[layer];
                if (depthFromSurface >= DepthForPAWC)
                {
                    bottomLayer = layer;
                    layer = soilPhysical.Thickness.Length;
                }
            }

            // write message in summary
            summary.WriteMessage(this," Automatic irrigation manager initialised", MessageType.Diagnostic);
            if (irrigationIsAllowed)
            {
                summary.WriteMessage(this,"  Irrigation is enabled between " + SeasonStartDate + " and " + SeasonEndDate, MessageType.Diagnostic);
                if (IrrigationTriggerType == IrrigationTriggerTypes.FixedInterval)
                {
                    summary.WriteMessage(this,"  Irrigation will be triggered every " + IntervalBetweenIrrigations + " days", MessageType.Diagnostic);
                }
                else
                {
                    summary.WriteMessage(this,"  Irrigation will be triggered every time soil moisture is below " + TriggerDeficit.ToString("#0.0") + "% of PAWC", MessageType.Diagnostic);
                }

                if (IrrigationAmountType == IrrigationAmountTypes.GivenAmount)
                {
                    summary.WriteMessage(this,"  Amount to be applied is fixed at " + Math.Min(MaximumAmount, GivenAmount).ToString("#0.0") + "mm each application", MessageType.Diagnostic);
                }
                else
                {
                    summary.WriteMessage(this,"  Amount to be applied will aim to bring soil moisture up to " + TargetDeficit.ToString("#0.0") + "% of PAWC", MessageType.Diagnostic);
                    summary.WriteMessage(this,"   limited to " + MaximumAmount.ToString("#0.0") + "mm in each application", MessageType.Diagnostic);
                }
            }
            else
            {
                summary.WriteMessage(this,"  Irrigation is disabled", MessageType.Diagnostic);
            }
        }

        [EventSubscribe("StartOfDay")]
        private void OnStartOfDay(object sender, EventArgs e)
        {
            //Check for whether we are within the irrigation season
            if(DateUtilities.WithinDates(SeasonStartDate, clock.Today, SeasonEndDate))
            {
                seasonIsOpen = true;
            }
            else
            {
                seasonIsOpen = false;
                SeasonAppliedAmount = 0;
            }

            //Check for whether there is a crop that needs irrigation
            cropIsActive = true;
            if (checkingCropActive)
            {
                if (!existingCrop.IsAlive)
                {
                    cropIsActive = false;
                }
            }
            //if ((existingCrop.Phenology.Stage >= 3.0) && (existingCrop.Phenology.Stage < 6.0))

            //Check whether there is significant rainfall
            rainIsNotSignificant = true;
            if (skippingRainDays && weather.Rain > 5.0)
            {
                rainIsNotSignificant = false;
            }

            //Check whether the irrigator available
            irrigatorIsAvailable = false;
            DaysSinceIrrigation += 1;
            if(IrrigationTriggerType == IrrigationTriggerTypes.FixedInterval)
            {
                if (DaysSinceIrrigation >= IntervalBetweenIrrigations)
                {
                    irrigatorIsAvailable = true;
                }
            }
            else
            {
                if (DaysSinceIrrigation >= ReturnDays)
                {
                    irrigatorIsAvailable = true;
                }
            }
        }

        [EventSubscribe("DoManagement")]
        private void OnDoManagement(object sender, EventArgs e)
        {
            //Get current soil moisture at appropriate depth
            TopSWC = 0.0;
            for (int layer = 0; layer < bottomLayer; layer++)
            {
                TopSWC += soilWater.SWmm[layer];
            }
            TopSWC += soilWater.SWmm[bottomLayer] * fracBottomLayer;

            //Check whether the soil is dry enough to require irrigation
            IrrigLayerSWDeficit = TopSWC - TopDUL;
            if(IrrigationTriggerType == IrrigationTriggerTypes.TriggerBySoilDeficit)
            {
                soilMoistureIsLow = false;
                if (Math.Max(0.0, -IrrigLayerSWDeficit) >= (TopDUL - TopLL) * (100.0 - TriggerDeficit) / 100.0)
                {
                    soilMoistureIsLow = true;
                }
            }
            else
            { // moisture is not checked
                soilMoistureIsLow = true;
            }

            //Are all the conditions ratifying irrigation
            if (irrigationIsAllowed && seasonIsOpen && cropIsActive && irrigatorIsAvailable && rainIsNotSignificant && soilMoistureIsLow)
            {
                //Lets bloody well irrigate then!!!!
                if(IrrigationAmountType == IrrigationAmountTypes.GivenAmount)
                {
                    AmountToApply = Math.Min(GivenAmount, MaximumAmount);
                }
                else
                {
                    AmountToApply = TopLL + (TopDUL - TopLL) * TargetDeficit / 100.0 - TopSWC;
                    AmountToApply = Math.Max(0.0, Math.Min(AmountToApply, MaximumAmount));
                }

                irrigator.Apply(amount: AmountToApply, depth: 0.0, duration: 1440, willRunoff: true);
                DaysSinceIrrigation = 0;
                SeasonAppliedAmount += AmountToApply;
            }
        }


        /// <summary>Flag for a yes or no answer</summary>
        public enum yesNoAnswer
        {
            /// <summary>Positive answer</summary>
            Yes,
            /// <summary>Negative answer</summary>
            No
        }

        /// <summary>Flag how irrigation will be triggered</summary>
        public enum IrrigationTriggerTypes
        {
            /// <summary>Setting a fixed interval</summary>
            FixedInterval,
            /// <summary>Setting a soil deficit</summary>
            TriggerBySoilDeficit
        }

        /// <summary>Flag how much irrigation will be applied</summary>
        public enum IrrigationAmountTypes
        {
            /// <summary>Setting a fixed interval</summary>
            GivenAmount,
            /// <summary>Setting a soil deficit</summary>
            BasedOnSoilDeficit
        }
    }
}
```
        Manager ApplySpikeOfN
          Amount = 450
          FertiliserType = NO3N
```csharp
using Models.Interfaces;
using APSIM.Shared.Utilities;
using Models.PMF;
using Models.Soils;
using Models.Core;
using System;
using System.Linq;
using Models.Soils.Nutrients;
using Newtonsoft.Json;
using System.Xml.Serialization;

namespace Models
{
    [Serializable]
    public class Script : Model
    {
        [Link] private Clock clock;
        [Link] private Fertiliser fertiliser;
        [Link] private ISummary summary;
        [Link] private Nutrient nutrient;
        [Link] private DateChangerScript dateChangerScript;

        [Separator("Nitrogen will be applied on the date set by the DateChanger Script")]
        
        [Description("Amount of N to apply (kg N /ha) for each deposition")]
        public double Amount { get; set; }

        [Description("Type of fertiliser to apply? ")] 
        [Display(Type = DisplayType.FertiliserType)]public string FertiliserType { get; set; }

        [XmlIgnore] public double Depth { get; set; }
		[XmlIgnore] public DateTime myApplicationDate {get; set;}
        [XmlIgnore] public double SpikeNApplied { get; set; }
        
        [EventSubscribe("StartOfSimulation")]
        private void FindSoilNOrNutrient(object sender, EventArgs e)
        {
            myApplicationDate = dateChangerScript.ApplicationDate;
            summary.WriteMessage(this, "The application date will be " + myApplicationDate, MessageType.Information);
        }

        [EventSubscribe("DoManagement")]
        private void OnDoManagement(object sender, EventArgs e)
        {
            SpikeNApplied = 0.0;
            if (clock.Today == myApplicationDate)
            {
                fertiliser.Apply(Amount, FertiliserType, 5.0);
                summary.WriteMessage(this, "N addition of " + Amount + " kg N /ha to a depth of " + Depth + " mm", MessageType.Information); 
                SpikeNApplied = Amount;
            }
        }
    }
}
```
        Manager Outputs1000mm
          TargetDepth = 1000
```csharp
// Gets an output at a particular depth for reporting
using System;
using System.Xml.Serialization;
using APSIM.Shared.Utilities;
using Models.Interfaces;
using Models.Core;
using Models.PMF;
using Models.Soils;
using Models.Soils.Nutrients;

namespace Models
{
    [Serializable]
    [System.Xml.Serialization.XmlInclude(typeof(Model))]
    public class Script : Model
    {
        [Link] private Clock clock;
        [Link] private IPhysical physical;
        [Link] private ISoilWater soilWater;
        [Link] private Nutrient nutrient;
        [Link(ByName = true)] private ISolute urea;
        [Link(ByName = true)] private ISolute nH4;
        [Link(ByName = true)] private ISolute nO3;
        [Link] private ISummary summary;

        [Separator("This just gets leaching at the specified depth for reporting")]

        [Description("Depth for reporting (mm)")]
        public double TargetDepth { get; set; }

        [XmlIgnore] public double LeachingForOutput { get; set; }
        [XmlIgnore] public double DrainageForOutput { get; set; }
        [XmlIgnore] public double DenitrificationForOutput { get; set; }
        [XmlIgnore] public double N2OForOutput { get; set; }
        [XmlIgnore] public int Layer { get; set; }


        [EventSubscribe("StartOfSimulation")]
        private void OnStartOfSimulation(object sender, EventArgs e)
        {
            Layer = 0;
            for (int i = 0; i < physical.Thickness.Length; i++)
            {
                if (Layer < 1 && physical.ThicknessCumulative[i] >= TargetDepth)  // this will only trigger the first time the cumulative depth is greater than the target depth
                    Layer = i;   
            }
        }

        [EventSubscribe("DoReportCalculations")]
        private void OnDoReportCalculations(object sender, EventArgs e)
        {
            LeachingForOutput = urea.Flow[Layer] + nH4.Flow[Layer] + nO3.Flow[Layer];
            DrainageForOutput = soilWater.Flow[Layer] + soilWater.Flux[Layer];
            
            DenitrificationForOutput = 0.0;
            N2OForOutput = 0.0;
            for (int i = 0; i <= Layer; i++)
            {
                DenitrificationForOutput += nutrient.DenitrifiedN[i];
                if (physical.ThicknessCumulative[i] <= 300.0)
                    N2OForOutput += nutrient.N2Oatm[i];
            }
        }
    }
}
```
        Irrigation
        Fertiliser
        SurfaceOrganicMatter: InitialResidueName=grass; InitialResidueType=grass; InitialResidueMass=1000; InitialStandingFraction=0; InitialCPR=0; InitialCNR=25
        PastureSpecies AGPRyegrass: doyGermination=275; daysEmergenceToAnthesis=120; daysAnthesisToMaturity=85; degreesDayForAnthesis=1100; degreesDayForMaturity=900; daysAnnualsFactor=45; CanopyType=PastureSpecies; InitialShootDM=1250; InitialRootDM=450; InitialRootDepth=1000; initialDMFractionsGrasses=[0.15, 0.25, 0.25, 0.05, 0.05, 0.1, 0.1, 0.05, 0, 0, 0]; initialDMFractionsForbs=[0.2, 0.2, 0.15, 0.05, 0.1, 0.15, 0.1, 0.05, 0, 0, 0]; PhotosyntheticEfficiency=0.01; PhotosynthesisCurveFactor=0.8; FractionPAR=0.5; ReferenceCO2=380; CO2EffectScaleFactor=700; CO2EffectOffsetFactor=600; CO2EffectMinimum=0.7; CO2EffectExponent=2; ReproSeasonDurationCoeff=2; ReproSeasonShouldersLengthFactor=1; ReproSeasonOnsetDurationFactor=0.6; RelativeTurnoverEmerging=2; DetachmentDroughtCoefficient=3; DetachmentDroughtEffectMin=0.1; TurnoverStockFactor=0.01; TurnoverDefoliationEffectMin=0.025; MinimumGreenLeafProp=0.8; MinimumGreenRootProp=0.5
          initialDMFractionsLegumes=[0.16, 0.23, 0.22, 0.05, 0.03, 0.05, 0.05, 0.01, 0.04, 0.08, 0.08]
          LinearInterpolationFunction FVPDFunction
        PastureSpecies AGPWhiteClover: doyGermination=275; daysEmergenceToAnthesis=120; daysAnthesisToMaturity=85; degreesDayForAnthesis=1100; degreesDayForMaturity=900; daysAnnualsFactor=45; CanopyType=PastureSpecies; InitialShootDM=500; InitialRootDM=150; InitialRootDepth=350; initialDMFractionsGrasses=[0.15, 0.25, 0.25, 0.05, 0.05, 0.1, 0.1, 0.05, 0, 0, 0]; initialDMFractionsForbs=[0.2, 0.2, 0.15, 0.05, 0.1, 0.15, 0.1, 0.05, 0, 0, 0]; PhotosyntheticEfficiency=0.01; PhotosynthesisCurveFactor=0.8; FractionPAR=0.5; ReferenceCO2=380; CO2EffectScaleFactor=700; CO2EffectOffsetFactor=600; CO2EffectMinimum=0.7; CO2EffectExponent=2; ReproSeasonDurationCoeff=2; ReproSeasonShouldersLengthFactor=1; ReproSeasonOnsetDurationFactor=0.6; RelativeTurnoverEmerging=2; DetachmentDroughtCoefficient=3; DetachmentDroughtEffectMin=0.1; TurnoverStockFactor=0.01; TurnoverDefoliationEffectMin=0.025; MinimumGreenLeafProp=0.8; MinimumGreenRootProp=0.5
          initialDMFractionsLegumes=[0.16, 0.23, 0.22, 0.05, 0.03, 0.05, 0.05, 0.01, 0.04, 0.08, 0.08]
          LinearInterpolationFunction FVPDFunction
        Soil: SoilType=Fluvial Raw Soils; LocalName=Birdlings_3a1; Country=New Zealand; Latitude=-41; Longitude=174
          DataSource=Profile descriptions provided by Smap based on the work done by Trevor Webb.
          Physical
            Thickness  ParticleSizeSand  ParticleSizeSilt  ParticleSizeClay  Rocks  BD     AirDry  LL15   DUL    SAT    KS
            25         95                4.5               0.5               85     0.219  0.004   0.008  0.033  0.063  14400
            208        95                4.5               0.5               85     0.252  0.006   0.007  0.024  0.052  14400
            208        95                4.5               0.5               85     0.252  0.006   0.007  0.024  0.052  14400
            209        95                4.5               0.5               85     0.252  0.006   0.007  0.024  0.052  14400
            225        95                4                 1                 80     0.332  0.01    0.01   0.033  0.07   14400
            225        95                4                 1                 80     0.332  0.01    0.01   0.033  0.07   14400
            225        95                4                 1                 80     0.332  0.01    0.01   0.033  0.07   14400
            225        95                4                 1                 80     0.332  0.01    0.01   0.033  0.07   14400
            225        95                4                 1                 80     0.332  0.01    0.01   0.033  0.07   14400
            225        95                4                 1                 80     0.332  0.01    0.01   0.033  0.07   14400
            SoilCrop AgPRyegrassSoil
              LL=[0.008, 0.007, 0.007, 0.007, 0.01, 0.01, 0.01, 0.01, 0.01, 0.01]
              KL=[0.0714967, 0, 0, 0, 0, 0, 0, 0, 0, 0]
              XF=[0.01, 0, 0, 0, 0, 0, 0, 0, 0, 0]
            SoilCrop AgPWhiteCloverSoil
              LL=[0.008, 0.007, 0.007, 0.007, 0.01, 0.01, 0.01, 0.01, 0.01, 0.01]
              KL=[0.134051, 0, 0, 0, 0, 0, 0, 0, 0, 0]
              XF=[0, 0, 0, 0, 0, 0, 0, 0, 0, 0]
          Organic: FOMCNRatio=40; CarbonUnits=Total
            Thickness  Carbon    SoilCNRatio  FBiom      FInert    FOM
            50         1         11           0.0788566  0.158981  634.514
            50         1         11           0.0610103  0.21901   0
            50         1         11           0.0477893  0.269823  0
            50         0.854985  11           0.037995   0.312835  0
            50         0.639049  11           0.0307392  0.349244  0
            50         0.494304  11           0.025364   0.380064  0
            50         0.397278  11           0.0213819  0.406152  0
            50         0.332239  11           0.0184319  0.539823  0
            50         0.288643  11           0.0162465  0.659987  0
            50         0.259419  11           0.0146275  0.752092  0
            250        0.217897  11           0.0118814  0.902619  0
            250        0.202422  11           0.0104198  0.975216  0
            500        0.200121  11           0.0100442  0.990824  0
            500        0.200002  11           0.0100022  0.996255  0
          Chemical: PHUnits=Water
            Thickness  PH  CEC
            25         7   11.01
            625        7   3.14419
            1350       7   0.985838
          Water: Thickness=[25, 625, 1350]; InitialValues=[0.033, 0.024, 0.033]; InitialPAWmm=42.3; RelativeTo=LL15; FilledFromTop=false
          WaterBalance SoilWater: SummerDate=1-oct; SummerU=9; SummerCona=4.4; WinterDate=1-apr; WinterU=4; WinterCona=2; DiffusConst=88; DiffusSlope=35; Salb=0.13; CN2Bare=77; CNRed=37; CNCov=0.8; PSIDul=-100
            Thickness  SWCON  KLAT
            25         0.5    0
            625        0.5    0
            1350       0.5    0
          SoilTemperature Temperature
          Solute NO3: Thickness=[25, 625, 1350]; InitialValues=[1.58333, 17.6225, 0.794118]; InitialValuesUnits=kg/ha; WaterTableConcentration=0; D0=0; DepthConstant=0; MaxDepthSoluteAccessible=0; RunoffEffectivenessAtMovingSolute=0; MaxEffectiveRunoff=0
          Solute NH4: Thickness=[25, 625, 1350]; InitialValues=[0.2375, 2.64338, 0.119118]; InitialValuesUnits=kg/ha; WaterTableConcentration=0; D0=0; DepthConstant=0; MaxDepthSoluteAccessible=0; RunoffEffectivenessAtMovingSolute=0; MaxEffectiveRunoff=0
          Solute Urea: Thickness=[25, 625, 1350]; InitialValues=[0, 0, 0]; InitialValuesUnits=ppm; WaterTableConcentration=0; D0=0; DepthConstant=0; MaxDepthSoluteAccessible=0; RunoffEffectivenessAtMovingSolute=0; MaxEffectiveRunoff=0
          Nutrient
        Report
          VariableNames:
            [Clock].Today as SimEndDate
            [Weather].FileName as Agent
            [Soil].LocalName as Soil
            Sum of [Outputs1000mm].Script.LeachingForOutput from [DateChanger].DateChangerScript.ApplicationDate to [Clock].Today as Leaching1000mm
            Sum of [ISoilWater].Runoff from [DateChanger].DateChangerScript.ApplicationDate to [DateChanger].DateChangerScript.ApplicationDatePlus30 as Runoff30
            Sum of [ISoilWater].Runoff from [DateChanger].DateChangerScript.ApplicationDate to [DateChanger].DateChangerScript.ApplicationDatePlus60 as Runoff60
            Sum of [ISoilWater].Runoff from [DateChanger].DateChangerScript.ApplicationDate to [DateChanger].DateChangerScript.ApplicationDatePlus90 as Runoff90
            Sum of [ISoilWater].Runoff from [DateChanger].DateChangerScript.ApplicationDate to [Clock].Today as RunoffCum
            Sum of [Outputs1000mm].Script.DrainageForOutput from [DateChanger].DateChangerScript.ApplicationDate to [Clock].Today as Drainage1000mm
            Sum of [Outputs1000mm].Script.DenitrificationForOutput from [DateChanger].DateChangerScript.ApplicationDate to [Clock].Today as Denitrification1000mm
            Sum of [Outputs1000mm].Script.N2OForOutput from [DateChanger].DateChangerScript.ApplicationDate to [Clock].Today as N2O300mm
            Sum of ([AGPRyegrass].HarvestedWt + [AGPWhiteClover].HarvestedWt) from [DateChanger].DateChangerScript.ApplicationDate to [Clock].Today as HarvestedDM
            Sum of ([AGPRyegrass].HarvestedN + [AGPWhiteClover].HarvestedN) from [DateChanger].DateChangerScript.ApplicationDate to [Clock].Today as HarvestedN
            Sum of [Weather].Rain from [DateChanger].DateChangerScript.ApplicationDate to [Clock].Today as Rainfall
            Sum of [Irrigation].IrrigationApplied from [DateChanger].DateChangerScript.ApplicationDate to [Clock].Today as Irrigation
            Sum of [ApplySpikeOfN].Script.SpikeNApplied from [DateChanger].DateChangerScript.ApplicationDate to [Clock].Today as SpikeNApplied
          EventNames:
            [Clock].EndOfSimulation
